*Heading
** Job name: Job-1 Model name: Model-1
** Generated by: Abaqus/CAE 2018
*Preprint, echo=NO, model=NO, history=NO, contact=NO
**
** PARTS
**
*Part, name=Part-1
*Node
      1,         -0.5,           0.,           0.
      2,         -0.5, -0.0500000007,           0.
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*Element, type=S4R
   1,    1,    2,  178,  177
   2,    2,    3,  179,  178
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*Nset, nset=Set-1, generate
    1,  3696,     1
*Elset, elset=Set-1, generate
    1,  3500,     1
** Section: Section-1
*Shell Section, elset=Set-1, material=Material-1
0.0023, 5
*End Part
**
**
** ASSEMBLY
**
*Assembly, name=Assembly
**
*Instance, name=Part-1-1, part=Part-1
*End Instance
**
*Nset, nset=Set-1, instance=Part-1-1
 1761,
*Nset, nset=Set-2, instance=Part-1-1
 1761,
*Nset, nset=Set-3, instance=Part-1-1, generate
    1,  3521,   176
*Elset, elset=Set-3, instance=Part-1-1, generate
    1,  3326,   175
*Nset, nset=Set-4, instance=Part-1-1, generate
    1,  3521,   176
*Elset, elset=Set-4, instance=Part-1-1, generate
    1,  3326,   175
*Nset, nset=Set-5, instance=Part-1-1, generate
    1,  3521,   176
*Elset, elset=Set-5, instance=Part-1-1, generate
    1,  3326,   175
*End Assembly
**
** MATERIALS
**
*Material, name=Material-1
*Elastic
 1e+06, 0.5
** ----------------------------------------------------------------
**
** STEP: Step-1
**
*Step, name=Step-1, nlgeom=YES
*Static
1., 1., 1e-05, 1.
**
** BOUNDARY CONDITIONS
**
** Name: Curvature Type: Displacement/Rotation Using Analytical Field: Curvature
*Boundary
Part-1-1.1, 3, 3, 2.44929e-16
Part-1-1.177, 3, 3, 0.309017
Part-1-1.353, 3, 3, 0.587785
Part-1-1.529, 3, 3, 0.809017
Part-1-1.705, 3, 3, 0.951056
Part-1-1.881, 3, 3, 1.
Part-1-1.1057, 3, 3, 0.951057
Part-1-1.1233, 3, 3, 0.809017
Part-1-1.1409, 3, 3, 0.587785
Part-1-1.1585, 3, 3, 0.309017
Part-1-1.1761, 3, 3, -1.22465e-16
Part-1-1.1937, 3, 3, -0.309017
Part-1-1.2113, 3, 3, -0.587785
Part-1-1.2289, 3, 3, -0.809017
Part-1-1.2465, 3, 3, -0.951057
Part-1-1.2641, 3, 3, -1.
Part-1-1.2817, 3, 3, -0.951056
Part-1-1.2993, 3, 3, -0.809017
Part-1-1.3169, 3, 3, -0.587785
Part-1-1.3345, 3, 3, -0.309017
Part-1-1.3521, 3, 3
** Name: Fixed X Type: Displacement/Rotation
*Boundary
Set-2, 1, 1
** Name: Fixed Y Type: Displacement/Rotation
*Boundary
Set-3, 2, 2
** Name: X-rotation Type: Displacement/Rotation
*Boundary
Set-4, 4, 4
**
** OUTPUT REQUESTS
**
*Restart, write, frequency=0
**
** FIELD OUTPUT: F-Output-1
**
*Output, field, variable=PRESELECT
**
** HISTORY OUTPUT: H-Output-1
**
*Output, history, variable=PRESELECT
*End Step
